// SBML level 3 version 1

model main()

  // Compartments:
  compartment default = 1;

  // Species:
  species DBP in default = 0.8849466;
  species ROR in default = 0.6995484;
  species BMAL1 in default = 0.06721176;
  species NFIL3 in default = 0.5151853;
  species REV_ERB in default = 0.4987552;
  species PER in default = 0.5152478;
  species CRY in default = 0.4304731;
  species AMPK in default = 0.558871;
  species FBXL3 in default = 0.6161664;
  species FBXL21 in default = 0.4106481;
  species CREB in default = 0.6565214;
  species TGF_beta in default = 0.1896568;
  species COL2A in default = 0.2170334;
  species COL1A in default = 0.146919;
  species ACAN in default = 0.2072817;
  species TGFBRI in default = 0.9936762;
  species IGF1 in default = 0.4586597;
  species IGF1R in default = 0.3547898;
  species GDF5 in default = 0.001553296;
  species IL_10 in default = 0.1361462;
  species IL_10R1 in default = 0.9129574;
  species IL_4 in default = 0.4573408;
  species IL_4R in default = 0.1003446;
  species IL_1beta in default = 0.9747581;
  species IL_1R1 in default = 0.6549436;
  species IL_6 in default = 0.8473193;
  species IL_6R in default = 0.9846578;
  species IL_17 in default = 0.4493889;
  species IL_17R in default = 0.522903;
  species IL_1RA in default = 0.5447382;
  species IFN_gamma in default = 0.2431269;
  species IFN_gammaR in default = 0.3032381;
  species TNF in default = 0.4423742;
  species TNFR1 in default = 0.9274321;
  species ADAMTS4_5 in default = 0.4617107;
  species MMP13 in default = 0.1169937;
  species MMP3 in default = 0.1536366;
  species VEGF in default = 0.9271438;
  species iNos in default = 0.04067685;
  species Cox2 in default = 0.1678919;
  species CCL3_4 in default = 0.4081575;
  species TIMP3 in default = 0.2336714;
  species CCN2 in default = 0.9765174;
  species NF_kB in default = 0.1151286;
  species p65 in default = 0.410807;
  species IkBalpha in default = 0.6537944;
  species ERK in default = 0.4220457;
  species cJun in default = 0.7270977;
  species JNK in default = 0.7474006;
  species p38 in default = 0.2559928;
  species akt1 in default = 0.7068213;
  species Sox9 in default = 0.8375984;
  species JAK in default = 0.4374226;
  species STAT1 in default = 0.212348;
  species STAT3 in default = 0.3473383;
  species STAT4 in default = 0.009985023;
  species STAT6 in default = 0.7234846;
  species SMAD2_3 in default = 0.04315291;
  species SMAD1_5_8_4 in default = 0.9237116;
  species wnt5a in default = 0.05390736;
  species beta_catenin in default = 0.827822;

  // Parameters:
  gamma = 1;
  h = 10;

  // Reactions:
  reaction_DBP: => DBP; (-exp(0.5*h) + exp(-h*((1 + 1)/1*(1*ROR/(1 + 1*ROR)) - 0.5)))/((1 - exp(0.5*h))*(1 + exp(-h*((1 + 1)/1*(1*ROR/(1 + 1*ROR)) - 0.5)))) - gamma*DBP;
  reaction_ROR: => ROR; (-exp(0.5*h) + exp(-h*((1 + 2)/2*(1*BMAL1 + 1*NFIL3/(1 + 1*BMAL1 + 1*NFIL3)) - 0.5)))/((1 - exp(0.5*h))*(1 + exp(-h*((1 + 2)/2*(1*BMAL1 + 1*NFIL3/(1 + 1*BMAL1 + 1*NFIL3)) - 0.5)))) - gamma*ROR;
  reaction_BMAL1: => BMAL1; (-exp(0.5*h) + exp(-h*((1 + 4)/4*(1*DBP + 1*REV_ERB + 1*PER + 1*CRY/(1 + 1*DBP + 1*REV_ERB + 1*PER + 1*CRY)) - 0.5)))/((1 - exp(0.5*h))*(1 + exp(-h*((1 + 4)/4*(1*DBP + 1*REV_ERB + 1*PER + 1*CRY/(1 + 1*DBP + 1*REV_ERB + 1*PER + 1*CRY)) - 0.5)))) - gamma*BMAL1;
  reaction_NFIL3: => NFIL3; (-exp(0.5*h) + exp(-h*((1 + 1)/1*(1*ROR/(1 + 1*ROR)) - 0.5)))/((1 - exp(0.5*h))*(1 + exp(-h*((1 + 1)/1*(1*ROR/(1 + 1*ROR)) - 0.5)))) - gamma*NFIL3;
  reaction_REV_ERB: => REV_ERB; (-exp(0.5*h) + exp(-h*(0 - 0.5)))/((1 - exp(0.5*h))*(1 + exp(-h*(0 - 0.5)))) - gamma*REV_ERB;
  reaction_PER: => PER; (-exp(0.5*h) + exp(-h*(1 - (1 + 1)/1*(1*BMAL1/(1 + 1*BMAL1)) - 0.5)))/((1 - exp(0.5*h))*(1 + exp(-h*(1 - (1 + 1)/1*(1*BMAL1/(1 + 1*BMAL1)) - 0.5)))) - gamma*PER;
  reaction_CRY: => CRY; (-exp(0.5*h) + exp(-h*(1 - (1 + 1)/1*(1*BMAL1/(1 + 1*BMAL1)) - 0.5)))/((1 - exp(0.5*h))*(1 + exp(-h*(1 - (1 + 1)/1*(1*BMAL1/(1 + 1*BMAL1)) - 0.5)))) - gamma*CRY;
  reaction_AMPK: => AMPK; (-exp(0.5*h) + exp(-h*(1 - (1 + 1)/1*(1*CRY/(1 + 1*CRY)) - 0.5)))/((1 - exp(0.5*h))*(1 + exp(-h*(1 - (1 + 1)/1*(1*CRY/(1 + 1*CRY)) - 0.5)))) - gamma*AMPK;
  reaction_FBXL3: => FBXL3; (-exp(0.5*h) + exp(-h*((1 + 1)/1*(1*AMPK/(1 + 1*AMPK)) - 0.5)))/((1 - exp(0.5*h))*(1 + exp(-h*((1 + 1)/1*(1*AMPK/(1 + 1*AMPK)) - 0.5)))) - gamma*FBXL3;
  reaction_FBXL21: => FBXL21; (-exp(0.5*h) + exp(-h*(1 - (1 + 2)/2*(1*CRY + 1*FBXL3/(1 + 1*CRY + 1*FBXL3)) - 0.5)))/((1 - exp(0.5*h))*(1 + exp(-h*(1 - (1 + 2)/2*(1*CRY + 1*FBXL3/(1 + 1*CRY + 1*FBXL3)) - 0.5)))) - gamma*FBXL21;
  reaction_CREB: => CREB; (-exp(0.5*h) + exp(-h*((1 + 1)/1*(1*PER/(1 + 1*PER)) - 0.5)))/((1 - exp(0.5*h))*(1 + exp(-h*((1 + 1)/1*(1*PER/(1 + 1*PER)) - 0.5)))) - gamma*CREB;
  reaction_TGF_beta: => TGF_beta; (-exp(0.5*h) + exp(-h*(0 - 0.5)))/((1 - exp(0.5*h))*(1 + exp(-h*(0 - 0.5)))) - gamma*TGF_beta;
  reaction_COL2A: => COL2A; (-exp(0.5*h) + exp(-h*(0 - 0.5)))/((1 - exp(0.5*h))*(1 + exp(-h*(0 - 0.5)))) - gamma*COL2A;
  reaction_COL1A: => COL1A; (-exp(0.5*h) + exp(-h*(0 - 0.5)))/((1 - exp(0.5*h))*(1 + exp(-h*(0 - 0.5)))) - gamma*COL1A;
  reaction_ACAN: => ACAN; (-exp(0.5*h) + exp(-h*(0 - 0.5)))/((1 - exp(0.5*h))*(1 + exp(-h*(0 - 0.5)))) - gamma*ACAN;
  reaction_TGFBRI: => TGFBRI; (-exp(0.5*h) + exp(-h*((1 + 3)/3*(1*ERK + 1*Sox9 + 1*SMAD2_3/(1 + 1*ERK + 1*Sox9 + 1*SMAD2_3)) - 0.5)))/((1 - exp(0.5*h))*(1 + exp(-h*((1 + 3)/3*(1*ERK + 1*Sox9 + 1*SMAD2_3/(1 + 1*ERK + 1*Sox9 + 1*SMAD2_3)) - 0.5)))) - gamma*TGFBRI;
  reaction_IGF1: => IGF1; (-exp(0.5*h) + exp(-h*((1 + 1)/1*(1*IGF1R/(1 + 1*IGF1R)) - 0.5)))/((1 - exp(0.5*h))*(1 + exp(-h*((1 + 1)/1*(1*IGF1R/(1 + 1*IGF1R)) - 0.5)))) - gamma*IGF1;
  reaction_IGF1R: => IGF1R; (-exp(0.5*h) + exp(-h*((1 + 2)/2*(1*ERK + 1*akt1/(1 + 1*ERK + 1*akt1)) - 0.5)))/((1 - exp(0.5*h))*(1 + exp(-h*((1 + 2)/2*(1*ERK + 1*akt1/(1 + 1*ERK + 1*akt1)) - 0.5)))) - gamma*IGF1R;
  reaction_GDF5: => GDF5; (-exp(0.5*h) + exp(-h*((1 + 2)/2*(1*COL2A + 1*ACAN/(1 + 1*COL2A + 1*ACAN))*(1 - (1 + 1)/1*(1*wnt5a/(1 + 1*wnt5a))) - 0.5)))/((1 - exp(0.5*h))*(1 + exp(-h*((1 + 2)/2*(1*COL2A + 1*ACAN/(1 + 1*COL2A + 1*ACAN))*(1 - (1 + 1)/1*(1*wnt5a/(1 + 1*wnt5a))) - 0.5)))) - gamma*GDF5;
  reaction_IL_10: => IL_10; (-exp(0.5*h) + exp(-h*(0 - 0.5)))/((1 - exp(0.5*h))*(1 + exp(-h*(0 - 0.5)))) - gamma*IL_10;
  reaction_IL_10R1: => IL_10R1; (-exp(0.5*h) + exp(-h*(0 - 0.5)))/((1 - exp(0.5*h))*(1 + exp(-h*(0 - 0.5)))) - gamma*IL_10R1;
  reaction_IL_4: => IL_4; (-exp(0.5*h) + exp(-h*(0 - 0.5)))/((1 - exp(0.5*h))*(1 + exp(-h*(0 - 0.5)))) - gamma*IL_4;
  reaction_IL_4R: => IL_4R; (-exp(0.5*h) + exp(-h*(0 - 0.5)))/((1 - exp(0.5*h))*(1 + exp(-h*(0 - 0.5)))) - gamma*IL_4R;
  reaction_IL_1beta: => IL_1beta; (-exp(0.5*h) + exp(-h*(0 - 0.5)))/((1 - exp(0.5*h))*(1 + exp(-h*(0 - 0.5)))) - gamma*IL_1beta;
  reaction_IL_1R1: => IL_1R1; (-exp(0.5*h) + exp(-h*(0 - 0.5)))/((1 - exp(0.5*h))*(1 + exp(-h*(0 - 0.5)))) - gamma*IL_1R1;
  reaction_IL_6: => IL_6; (-exp(0.5*h) + exp(-h*(0 - 0.5)))/((1 - exp(0.5*h))*(1 + exp(-h*(0 - 0.5)))) - gamma*IL_6;
  reaction_IL_6R: => IL_6R; (-exp(0.5*h) + exp(-h*(0 - 0.5)))/((1 - exp(0.5*h))*(1 + exp(-h*(0 - 0.5)))) - gamma*IL_6R;
  reaction_IL_17: => IL_17; (-exp(0.5*h) + exp(-h*(0 - 0.5)))/((1 - exp(0.5*h))*(1 + exp(-h*(0 - 0.5)))) - gamma*IL_17;
  reaction_IL_17R: => IL_17R; (-exp(0.5*h) + exp(-h*(0 - 0.5)))/((1 - exp(0.5*h))*(1 + exp(-h*(0 - 0.5)))) - gamma*IL_17R;
  reaction_IL_1RA: => IL_1RA; (-exp(0.5*h) + exp(-h*(0 - 0.5)))/((1 - exp(0.5*h))*(1 + exp(-h*(0 - 0.5)))) - gamma*IL_1RA;
  reaction_IFN_gamma: => IFN_gamma; (-exp(0.5*h) + exp(-h*(0 - 0.5)))/((1 - exp(0.5*h))*(1 + exp(-h*(0 - 0.5)))) - gamma*IFN_gamma;
  reaction_IFN_gammaR: => IFN_gammaR; (-exp(0.5*h) + exp(-h*(0 - 0.5)))/((1 - exp(0.5*h))*(1 + exp(-h*(0 - 0.5)))) - gamma*IFN_gammaR;
  reaction_TNF: => TNF; (-exp(0.5*h) + exp(-h*((1 + 4)/4*(1*TNFR1 + 1*NF_kB + 1*JNK + 1*p38/(1 + 1*TNFR1 + 1*NF_kB + 1*JNK + 1*p38))*(1 - (1 + 2)/2*(1*COL2A + 1*ACAN/(1 + 1*COL2A + 1*ACAN))) - 0.5)))/((1 - exp(0.5*h))*(1 + exp(-h*((1 + 4)/4*(1*TNFR1 + 1*NF_kB + 1*JNK + 1*p38/(1 + 1*TNFR1 + 1*NF_kB + 1*JNK + 1*p38))*(1 - (1 + 2)/2*(1*COL2A + 1*ACAN/(1 + 1*COL2A + 1*ACAN))) - 0.5)))) - gamma*TNF;
  reaction_TNFR1: => TNFR1; (-exp(0.5*h) + exp(-h*((1 + 6)/6*(1*IL_17R + 1*p65 + 1*ERK + 1*cJun + 1*p38 + 1*wnt5a/(1 + 1*IL_17R + 1*p65 + 1*ERK + 1*cJun + 1*p38 + 1*wnt5a)) - 0.5)))/((1 - exp(0.5*h))*(1 + exp(-h*((1 + 6)/6*(1*IL_17R + 1*p65 + 1*ERK + 1*cJun + 1*p38 + 1*wnt5a/(1 + 1*IL_17R + 1*p65 + 1*ERK + 1*cJun + 1*p38 + 1*wnt5a)) - 0.5)))) - gamma*TNFR1;
  reaction_ADAMTS4_5: => ADAMTS4_5; (-exp(0.5*h) + exp(-h*(0 - 0.5)))/((1 - exp(0.5*h))*(1 + exp(-h*(0 - 0.5)))) - gamma*ADAMTS4_5;
  reaction_MMP13: => MMP13; (-exp(0.5*h) + exp(-h*((1 + 1)/1*(1*IGF1/(1 + 1*IGF1)) - 0.5)))/((1 - exp(0.5*h))*(1 + exp(-h*((1 + 1)/1*(1*IGF1/(1 + 1*IGF1)) - 0.5)))) - gamma*MMP13;
  reaction_MMP3: => MMP3; (-exp(0.5*h) + exp(-h*((1 + 1)/1*(1*IGF1/(1 + 1*IGF1)) - 0.5)))/((1 - exp(0.5*h))*(1 + exp(-h*((1 + 1)/1*(1*IGF1/(1 + 1*IGF1)) - 0.5)))) - gamma*MMP3;
  reaction_VEGF: => VEGF; (-exp(0.5*h) + exp(-h*(0 - 0.5)))/((1 - exp(0.5*h))*(1 + exp(-h*(0 - 0.5)))) - gamma*VEGF;
  reaction_iNos: => iNos; (-exp(0.5*h) + exp(-h*(0 - 0.5)))/((1 - exp(0.5*h))*(1 + exp(-h*(0 - 0.5)))) - gamma*iNos;
  reaction_Cox2: => Cox2; (-exp(0.5*h) + exp(-h*(0 - 0.5)))/((1 - exp(0.5*h))*(1 + exp(-h*(0 - 0.5)))) - gamma*Cox2;
  reaction_CCL3_4: => CCL3_4; (-exp(0.5*h) + exp(-h*(0 - 0.5)))/((1 - exp(0.5*h))*(1 + exp(-h*(0 - 0.5)))) - gamma*CCL3_4;
  reaction_TIMP3: => TIMP3; (-exp(0.5*h) + exp(-h*(0 - 0.5)))/((1 - exp(0.5*h))*(1 + exp(-h*(0 - 0.5)))) - gamma*TIMP3;
  reaction_CCN2: => CCN2; (-exp(0.5*h) + exp(-h*(0 - 0.5)))/((1 - exp(0.5*h))*(1 + exp(-h*(0 - 0.5)))) - gamma*CCN2;
  reaction_NF_kB: => NF_kB; (-exp(0.5*h) + exp(-h*(0 - 0.5)))/((1 - exp(0.5*h))*(1 + exp(-h*(0 - 0.5)))) - gamma*NF_kB;
  reaction_p65: => p65; (-exp(0.5*h) + exp(-h*((1 + 1)/1*(1*ADAMTS4_5/(1 + 1*ADAMTS4_5)) - 0.5)))/((1 - exp(0.5*h))*(1 + exp(-h*((1 + 1)/1*(1*ADAMTS4_5/(1 + 1*ADAMTS4_5)) - 0.5)))) - gamma*p65;
  reaction_IkBalpha: => IkBalpha; (-exp(0.5*h) + exp(-h*(0 - 0.5)))/((1 - exp(0.5*h))*(1 + exp(-h*(0 - 0.5)))) - gamma*IkBalpha;
  reaction_ERK: => ERK; (-exp(0.5*h) + exp(-h*((1 + 2)/2*(1*CCL3_4 + 1*SMAD2_3/(1 + 1*CCL3_4 + 1*SMAD2_3)) - 0.5)))/((1 - exp(0.5*h))*(1 + exp(-h*((1 + 2)/2*(1*CCL3_4 + 1*SMAD2_3/(1 + 1*CCL3_4 + 1*SMAD2_3)) - 0.5)))) - gamma*ERK;
  reaction_cJun: => cJun; (-exp(0.5*h) + exp(-h*((1 + 8)/8*(1*TGF_beta + 1*COL2A + 1*ACAN + 1*TGFBRI + 1*IL_1R1 + 1*ADAMTS4_5 + 1*MMP3 + 1*TIMP3/(1 + 1*TGF_beta + 1*COL2A + 1*ACAN + 1*TGFBRI + 1*IL_1R1 + 1*ADAMTS4_5 + 1*MMP3 + 1*TIMP3))*(1 - (1 + 7)/7*(1*COL1A + 1*IL_1beta + 1*IL_6 + 1*IL_17 + 1*IL_17R + 1*TNF + 1*TNFR1/(1 + 1*COL1A + 1*IL_1beta + 1*IL_6 + 1*IL_17 + 1*IL_17R + 1*TNF + 1*TNFR1))) - 0.5)))/((1 - exp(0.5*h))*(1 + exp(-h*((1 + 8)/8*(1*TGF_beta + 1*COL2A + 1*ACAN + 1*TGFBRI + 1*IL_1R1 + 1*ADAMTS4_5 + 1*MMP3 + 1*TIMP3/(1 + 1*TGF_beta + 1*COL2A + 1*ACAN + 1*TGFBRI + 1*IL_1R1 + 1*ADAMTS4_5 + 1*MMP3 + 1*TIMP3))*(1 - (1 + 7)/7*(1*COL1A + 1*IL_1beta + 1*IL_6 + 1*IL_17 + 1*IL_17R + 1*TNF + 1*TNFR1/(1 + 1*COL1A + 1*IL_1beta + 1*IL_6 + 1*IL_17 + 1*IL_17R + 1*TNF + 1*TNFR1))) - 0.5)))) - gamma*cJun;
  reaction_JNK: => JNK; (-exp(0.5*h) + exp(-h*((1 + 2)/2*(1*IL_1R1 + 1*ERK/(1 + 1*IL_1R1 + 1*ERK))*(1 - (1 + 1)/1*(1*MMP13/(1 + 1*MMP13))) - 0.5)))/((1 - exp(0.5*h))*(1 + exp(-h*((1 + 2)/2*(1*IL_1R1 + 1*ERK/(1 + 1*IL_1R1 + 1*ERK))*(1 - (1 + 1)/1*(1*MMP13/(1 + 1*MMP13))) - 0.5)))) - gamma*JNK;
  reaction_p38: => p38; (-exp(0.5*h) + exp(-h*((1 + 3)/3*(1*CREB + 1*IL_1R1 + 1*MMP3/(1 + 1*CREB + 1*IL_1R1 + 1*MMP3)) - 0.5)))/((1 - exp(0.5*h))*(1 + exp(-h*((1 + 3)/3*(1*CREB + 1*IL_1R1 + 1*MMP3/(1 + 1*CREB + 1*IL_1R1 + 1*MMP3)) - 0.5)))) - gamma*p38;
  reaction_akt1: => akt1; (-exp(0.5*h) + exp(-h*((1 + 2)/2*(1*CREB + 1*Sox9/(1 + 1*CREB + 1*Sox9))*(1 - (1 + 2)/2*(1*MMP13 + 1*MMP3/(1 + 1*MMP13 + 1*MMP3))) - 0.5)))/((1 - exp(0.5*h))*(1 + exp(-h*((1 + 2)/2*(1*CREB + 1*Sox9/(1 + 1*CREB + 1*Sox9))*(1 - (1 + 2)/2*(1*MMP13 + 1*MMP3/(1 + 1*MMP13 + 1*MMP3))) - 0.5)))) - gamma*akt1;
  reaction_Sox9: => Sox9; (-exp(0.5*h) + exp(-h*((1 + 1)/1*(1*ACAN/(1 + 1*ACAN)) - 0.5)))/((1 - exp(0.5*h))*(1 + exp(-h*((1 + 1)/1*(1*ACAN/(1 + 1*ACAN)) - 0.5)))) - gamma*Sox9;
  reaction_JAK: => JAK; (-exp(0.5*h) + exp(-h*((1 + 1)/1*(1*STAT6/(1 + 1*STAT6)) - 0.5)))/((1 - exp(0.5*h))*(1 + exp(-h*((1 + 1)/1*(1*STAT6/(1 + 1*STAT6)) - 0.5)))) - gamma*JAK;
  reaction_STAT1: => STAT1; (-exp(0.5*h) + exp(-h*(0 - 0.5)))/((1 - exp(0.5*h))*(1 + exp(-h*(0 - 0.5)))) - gamma*STAT1;
  reaction_STAT3: => STAT3; (-exp(0.5*h) + exp(-h*((1 + 4)/4*(1*VEGF + 1*iNos + 1*akt1 + 1*STAT1/(1 + 1*VEGF + 1*iNos + 1*akt1 + 1*STAT1)) - 0.5)))/((1 - exp(0.5*h))*(1 + exp(-h*((1 + 4)/4*(1*VEGF + 1*iNos + 1*akt1 + 1*STAT1/(1 + 1*VEGF + 1*iNos + 1*akt1 + 1*STAT1)) - 0.5)))) - gamma*STAT3;
  reaction_STAT4: => STAT4; (-exp(0.5*h) + exp(-h*(0 - 0.5)))/((1 - exp(0.5*h))*(1 + exp(-h*(0 - 0.5)))) - gamma*STAT4;
  reaction_STAT6: => STAT6; (-exp(0.5*h) + exp(-h*((1 + 1)/1*(1*IL_4R/(1 + 1*IL_4R)) - 0.5)))/((1 - exp(0.5*h))*(1 + exp(-h*((1 + 1)/1*(1*IL_4R/(1 + 1*IL_4R)) - 0.5)))) - gamma*STAT6;
  reaction_SMAD2_3: => SMAD2_3; (-exp(0.5*h) + exp(-h*(0 - 0.5)))/((1 - exp(0.5*h))*(1 + exp(-h*(0 - 0.5)))) - gamma*SMAD2_3;
  reaction_SMAD1_5_8_4: => SMAD1_5_8_4; (-exp(0.5*h) + exp(-h*(0 - 0.5)))/((1 - exp(0.5*h))*(1 + exp(-h*(0 - 0.5)))) - gamma*SMAD1_5_8_4;
  reaction_wnt5a: => wnt5a; (-exp(0.5*h) + exp(-h*((1 + 1)/1*(1*beta_catenin/(1 + 1*beta_catenin))*(1 - (1 + 5)/5*(1*TNFR1 + 1*MMP13 + 1*MMP3 + 1*NF_kB + 1*p65/(1 + 1*TNFR1 + 1*MMP13 + 1*MMP3 + 1*NF_kB + 1*p65))) - 0.5)))/((1 - exp(0.5*h))*(1 + exp(-h*((1 + 1)/1*(1*beta_catenin/(1 + 1*beta_catenin))*(1 - (1 + 5)/5*(1*TNFR1 + 1*MMP13 + 1*MMP3 + 1*NF_kB + 1*p65/(1 + 1*TNFR1 + 1*MMP13 + 1*MMP3 + 1*NF_kB + 1*p65))) - 0.5)))) - gamma*wnt5a;
  reaction_beta_catenin: => beta_catenin; (-exp(0.5*h) + exp(-h*(0 - 0.5)))/((1 - exp(0.5*h))*(1 + exp(-h*(0 - 0.5)))) - gamma*beta_catenin;
end
